[21.53, 14.67, -0.18; 8.54, -7.89, -14.71; 11.96, -8.05, 25.62] + [7.90, 21.51, -17.46; 22.07, 1.05, -1.05; 27.45, 1.54, -0.87] = [29.43, 36.18, -17.64; 30.61, -6.84, -15.76; 39.41, -6.51, 24.75]
[21.53, 14.67, -0.18; 8.54, -7.89, -14.71; 11.96, -8.05, 25.62]*[7.90, 21.51, -17.46; 22.07, 1.05, -1.05; 27.45, 1.54, -0.87] = [488.913, 478.237, -391.161; -510.456, 152.757, -128.026; 620.09, 288.262, -222.659]
[21.53, 14.67, -0.18; 8.54, -7.89, -14.71; 11.96, -8.05, 25.62]*[-22.36; -4.07; -36.49] = [-534.549; 377.926; -1169.54]
[-22.36, -4.07, -36.49]*[-17.61; -16.89; 1.88] = 393.901
[-22.36, -4.07, -36.49]*[21.53, 14.67, -0.18; 8.54, -7.89, -14.71; 11.96, -8.05, 25.62]*[-17.61; -16.89; 1.88] = 15174.2
[-36.13; 5.98; -30.44]×[-18.25; -17.03; -33.39] = [-718.065; -650.851; 724.429]
[-36.13; 5.98; -30.44]*[-18.25; -17.03; -33.39] = 1573.92
|[-36.13; 5.98; -30.44]| = 47.6207
|[-18.25; -17.03; -33.39]| = 41.689
V1 := [-33.73; -37.40; -17.43]
V2 := [-11.26; -27.65; -14.80]
cos(V1*V2/(|V1|*|V2|)) = 0.588624
x := □  # error: This placeholder is empty.
sph2xyz(-33.73, -37.40, -17.43) = [-31.8644; -9.82582; -5.08191]
sph2xyz(-29.77, -15.56, 8.48) = [23.861; 3.55655; 17.4429]
