# Координаты
Xa := -2
Xb := -3
Xc := 0
Xd := 3
Xe := 2
Xf := -2
Xg := 2
Ya := -4
Yb := 0
Yc := 4
Yd := 0
Ye := -4
Yf := 0
Yg := 0
Xlw := 100
Ylw := 200
Xhw := 400
Yhw := 500
Zx := transpose([Xa, Xb, Xc, Xd, Xe, Xf, Xg])
Zy := transpose([Ya, Yb, Yc, Yd, Ye, Yf, Yg])
Xl := min(Zx) = -3
Yl := min(Zy) = -4
Xh := max(Zx) = 3
Yh := max(Zy) = 4
# Параметры для формирования матрицы пересчета координат из МСК в ОСК
ΔXw := Xhw - Xlw = 300
ΔYw := Yhw - Ylw = 300
ΔX := Xh - Xl = 6
ΔY := Yh - Yl = 8
Ky := ΔYw/ΔY = 37.5
Kx := ΔXw/ΔX = 50
# Матрица пересчетов из МСК в ОСК
T := [Kx, 0, Xlw - Kx*Xl; 0, -Ky, Yhw + Ky*Yl; 0, 0, 1]
# Вычисляем координаты в ОСК
[Xaw; Yaw; Δ] := T*[Xa; Ya; 1] = [150; 500; 1]
[Xbw; Ybw; Δ] := T*[Xb; Yb; 1] = [100; 350; 1]
[Xcw; Ycw; Δ] := T*[Xc; Yc; 1] = [250; 200; 1]
[Xdw; Ydw; Δ] := T*[Xd; Yd; 1] = [400; 350; 1]
[Xew; Yew; Δ] := T*[Xe; Ye; 1] = [350; 500; 1]
[Xfw; Yfw; Δ] := T*[Xf; Yf; 1] = [150; 350; 1]
[Xgw; Ygw; Δ] := T*[Xg; Yg; 1] = [350; 350; 1]
X := transpose([Xb, Xc, Xd, Xb, Xf, Xa, Xe, Xg, Xd])
Xw := transpose([Xbw, Xcw, Xdw, Xbw, Xfw, Xaw, Xew, Xgw, Xdw])
Y := transpose([Yb, Yc, Yd, Yb, Yf, Ya, Ye, Yg, Yd])
Yw := -transpose([Ybw, Ycw, Ydw, Ybw, Yfw, Yaw, Yew, Ygw, Ydw])
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