# Координаты левого верхнего угла области D
Xlw := 100
Ylw := 200
# Координаты правого нижнего угла области D
Xhw := 800
Yhw := 900
# Функция
f(x) := sqrt(|x|)*sin(π*x)
x1 := -6
x2 := 6
ΔX := 0.1
N := round((x2 - x1)/ΔX) = 120
i := 0 .. N
X[i] := x1 + i*ΔX
Y[i] := f(X[i])
Z[i] := 1
# В МСК
Xl := min(X) = -6
Yl := min(Y) = -2.34521
Xh := max(X) = 6
Yh := max(Y) = 2.34521
M := stack(transpose(X), transpose(Y), transpose(Z))
ΔXw := Xhw - Xlw = 700
ΔYw := Yhw - Ylw = 700
Δx := Xh - Xl = 12
Δy := Yh - Yl = 4.69042
kx := ΔXw/Δx = 58.3333
ky := ΔYw/Δy = 149.241
# Матрица пересчетов
Tsw := [kx, 0, Xlw - kx*Xl; 0, -ky, Yhw + ky*Yl; 0, 0, 1]
Mw := Tsw*M
Xw := transpose(Mw)[:, 0]
Yw := transpose(Mw)[:, 1]
# График функции в МСК
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# График функции в ОСК
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