A(2, 12)
C(2, 3)
B(5, 9)
D(5, 6)
x1 := 2
x2 := 5
x3 := 2
x4 := 5
y1 := 12
y2 := 9
y3 := 3
y4 := 6
C := transpose([2, 3])
1.
D := transpose([5, 6])
x := 0
y := 0
Given
x + y - 14 == 0  # Уравнение прямой AB
x - y + 1 == 0  # Уравнение прямой CD
Find(x, y) = [6.5; 7.5]  # Точка пересечения прямых
xp := 6.5
yp := 7.5
# 2. | Новые координаты точек
# Матрица поворота М
M := [cos(π), sin(π); -sin(π), cos(π)]
# Новые координаты точек
Ap := M*[x1 - xp; y1 - yp] + [xp; yp] = [11; 3]
Bp := M*[x2 - xp; y2 - yp] + [xp; yp] = [8; 6]
Cp := M*[x3 - xp; y3 - yp] + [xp; yp] = [11; 12]
Dp := M*[x4 - xp; y4 - yp] + [xp; yp] = [8; 9]
# 3. | Построение графика
Mab := transpose([2, 5; 12, 9])
Mcd := transpose([2, 5; 3, 6])
Mabp := transpose([11, 8; 3, 6])
Mcdp := transpose([11, 8; 12, 9])
xab := Mab[:, 0]
xcd := Mcd[:, 0]
xabp := Mabp[:, 0]
xcdp := Mcdp[:, 0]
yab := Mab[:, 1]
ycd := Mcd[:, 1]
yabp := Mabp[:, 1]
ycdp := Mcdp[:, 1]
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