# Задать координаты вершин усеченной пирамиды в МДСК и положение камеры в МССК
A := transpose([5, 0, 0, 1])
B := transpose([0, 0, 0, 1])
C := transpose([0, 5, 0, 1])
PV := [10; 315; 45]
A1 := transpose([3, 0, 7, 1])
B1 := transpose([0, 0, 7, 1])
C1 := transpose([0, 5, 7, 1])
# Координаты камеры в радианах
rv := PV[0] = 10  # Матрица координат пирамиды
φv := PV[1]*π/180 = 5.49779
PIR := augment(A, B, C, A1, B1, C1) = [5, 0, 0, 3, 0, 0; 0, 0, 5, 0, 0, 5; 0, 0, 0, 7, 7, 7; 1, 1, 1, 1, 1, 1]
θv := PV[2]*π/180 = 0.785398
xlw := 200
xhw := 700
ylw := 100
yhw := 500
# Матрица пересчета координат из мировой системы в видовую
Kview := [
    -sin(φv), cos(φv), 0, 0;
    -cos(θv)*cos(φv), -cos(θv)*sin(φv), sin(θv), 0;
    -sin(θv)*cos(φv), -sin(θv)*sin(φv), -cos(θv), rv;
    0, 0, 0, 1
] = [0.707107, 0.707107, 0, 0; -0.5, 0.5, 0.707107, 0; -0.5, 0.5, -0.707107, 10; 0, 0, 0, 1]
# Координаты вершин пирамиды в видовой системе координат
PIR_V := Kview*PIR = [
    3.53553, 0, 3.53553, 2.12132, 0, 3.53553;
    -2.5, 0, 2.5, 3.44975, 4.94975, 7.44975;
    7.5, 10, 12.5, 3.55025, 5.05025, 7.55025;
    1, 1, 1, 1, 1, 1
]
# Координаты проекций вершин пирамиды на картинную плоскость (пл XvYv в видовой системе)
Xv := transpose(PIR_V)[:, 0] = [3.53553; 0; 3.53553; 2.12132; 0; 3.53553]
Yv := transpose(PIR_V)[:, 1] = [-2.5; 0; 2.5; 3.44975; 4.94975; 7.44975]
Iv := transpose(PIR_V)[:, 3]
# Матрица из координат проекций вершин пирамиды на картинную плоскость XvYv
Pxy := stack(transpose(Xv), transpose(Yv), transpose(Iv))
# Габаритная область проекции пирамиды на плоскость Xv Yv видовой системы
xl := min(Xv) = 0
xh := max(Xv) = 3.53553
yl := min(Yv) = -2.5
yh := max(Yv) = 7.44975
# Параметры, необходимые для формирования матрицы пересчета из видовой СК в оконную СК
Δx := xh - xl = 3.53553
Δxw := xhw - xlw = 500
Δy := yh - yl = 9.94975
Δyw := yhw - ylw = 400
kx := Δxw/Δx = 141.421
ky := Δyw/Δy = 40.202
# Матрица пересчета
M := [kx, 0, xlw - kx*xl; 0, -ky, yhw + ky*yl; 0, 0, 1] = [141.421, 0, 200; 0, -40.202, 399.495; 0, 0, 1]
