# Координаты вершин усеченной пирамиды в МДСК и положение камеры в МССК
PIR := [0, 0, 3, 0, 0, 1; 3, 0, 0, 1, 0, 0; 0, 0, 0, 3, 3, 3; 1, 1, 1, 1, 1, 1]
PV := [10; 315; 45]
pC := submatrix(PIR, 0, 2, 0, 0) = [0; 3; 0]
pB := submatrix(PIR, 0, 2, 1, 1) = [0; 0; 0]
pC1 := submatrix(PIR, 0, 2, 3, 3) = [0; 1; 3]
pB1 := submatrix(PIR, 0, 2, 4, 4) = [0; 0; 3]
pA := submatrix(PIR, 0, 2, 2, 2) = [3; 0; 0]
pA1 := submatrix(PIR, 0, 2, 5, 5) = [1; 0; 3]
# Координаты камеры в радианах
rv := PV[0] = 10
φv := PV[1]*π/180 = 5.49779
θv := PV[2]*π/180 = 0.785398
# Положение секущей плоскости в МСК XYZ
# Угол φ между осью z и вектором N
φgrad := 33
φ := (φgrad/180)*π = 0.575959
# Вектор нормали к секущей плоскости
N := transpose([0, sin(φ), cos(φ)]) = [0; 0.544639; 0.838671]
# Координаты точки пересечения с осью Z и секущей плоскостью
x0 := 0
y0 := 0
z0 := (3/4)*PIR[:, 3][2] = 2.25
# Параметры уравнения секущей плоскости
D := -(N[0]*x0 + N[1]*y0 + N[2]*z0) = -1.88701
# Точка пересечения P1 секущей плоскости с ребром СС1
V1 := pC = [0; 3; 0]
V2 := pC1 = [0; 1; 3]
ΔV := V2 - V1 = [0; -2; 3]
t_CC1 := -((N*V1 + D)/(N*ΔV)) = 0.177392  # - параметр, при котором ребро и плоскость имеют общую точку. Если между 0 и 1, то ребро пересекает плоскость
# Координаты точки пересечения P1
Vcc1 := V1 + ΔV*t_CC1 = [0; 2.64522; 0.532177]
x_CC1 := Vcc1[0] = 0
y_CC1 := Vcc1[1] = 2.64522
z_CC1 := Vcc1[2] = 0.532177
# Точка пересечения P2 секущей плоскости с ребром AA1
V1 := pA = [3; 0; 0]
V2 := pA1 = [1; 0; 3]
ΔV := V2 - V1 = [-2; 0; 3]
t_AA1 := -((N*V1 + D)/(N*ΔV)) = 0.75
V_AA1 := V1 + ΔV*t_AA1 = [1.5; 0; 2.25]
# Координаты точки пересечения Р2
V_AA1 := V1 + ΔV*t_AA1 = [1.5; 0; 2.25]
x_AA1 := V_AA1[0] = 1.5
y_AA1 := V_AA1[1] = 0
z_AA1 := V_AA1[2] = 2.25
# Точка пересечения P3 секущей плоскости с ребром BB1
V1 := pB = [0; 0; 0]
V2 := pB1 = [0; 0; 3]
ΔV := V2 - V1 = [0; 0; 3]
t_BB1 := -((N*V1 + D)/(N*ΔV)) = 0.75
# Координаты точки пересечения Р3
V_BB1 := V1 + ΔV*t_BB1 = [0; 0; 2.25]
x_BB1 := V_BB1[0] = 0
y_BB1 := V_BB1[1] = 0
z_BB1 := V_BB1[2] = 2.25
# Матрица мировых координат точек P1, P2, P3
TR := [x_CC1, x_AA1, x_BB1; y_CC1, y_AA1, y_BB1; z_CC1, z_AA1, z_BB1; 1, 1, 1] = [0, 1.5, 0; 2.64522, 0, 0; 0.532177, 2.25, 2.25; 1, 1, 1]
# Матрица пересчета координат из мировой системы в видовую
K_view := [
    -sin(φv), cos(φv), 0, 0;
    -cos(θv)*cos(φv), -cos(θv)*sin(φv), sin(θv), 0;
    -sin(θv)*cos(φv), -sin(θv)*sin(φv), -cos(θv), rv;
    0, 0, 0, 1
] = [0.707107, 0.707107, 0, 0; -0.5, 0.5, 0.707107, 0; -0.5, 0.5, -0.707107, 10; 0, 0, 0, 1]
# Координаты вершин пирамиды в видовой системе координат
PIR_V := K_view*PIR = [
    2.12132, 0, 2.12132, 0.707107, 0, 0.707107;
    1.5, 0, -1.5, 2.62132, 2.12132, 1.62132;
    11.5, 10, 8.5, 8.37868, 7.87868, 7.37868;
    1, 1, 1, 1, 1, 1
]
# Координаты вершин треугольника сечения P1, P2, P3 в видовой системе
TR_V := K_view*TR = [1.87045, 1.06066, 0; 1.69891, 0.84099, 1.59099; 10.9463, 7.65901, 8.40901; 1, 1, 1]
# Координаты проекции вершин пирамиды на картинную плоскость (без координат по Z)
P_XY := stack(transpose(transpose(PIR_V)[:, 0]), transpose(transpose(PIR_V)[:, 1]), transpose(transpose(PIR_V)[:, 3])) = [
    2.12132, 0, 2.12132, 0.707107, 0, 0.707107;
    1.5, 0, -1.5, 2.62132, 2.12132, 1.62132;
    1, 1, 1, 1, 1, 1
]
# Координаты проекции вершин треугольника сечения Р1, Р2, Р3 на картинную плоскость (без координат по Z)
TR_XY := stack(transpose(transpose(TR_V)[:, 0]), transpose(transpose(TR_V)[:, 1]), transpose(transpose(TR_V)[:, 3])) = [1.87045, 1.06066, 0; 1.69891, 0.84099, 1.59099; 1, 1, 1]
# Габаритная область проекции пирамиды на плоскость XY видовой системы
xl := min(transpose(P_XY)[:, 0]) = 0
# - левый верхний угол
yh := max(transpose(P_XY)[:, 1]) = 2.62132
xh := max(transpose(P_XY)[:, 0]) = 2.12132
# - правый нижний угол
yl := min(transpose(P_XY)[:, 1]) = -1.5
# Область отображения графика в окне Windows
# Левый верхний угол | Правый нижний угол
xlw := 200
xhw := 700
ylw := 100
yhw := 500
# Параметры, необходимые для формирования матрицы пересчета координат из плоскости XY видовой СК в оконную СК
Δxw := xhw - xlw = 500
Δx := xh - xl = 2.12132
Δyw := yhw - ylw = 400
Δy := yh - yl = 4.12132
kx := Δxw/Δx = 235.702
ky := Δyw/Δy = 97.0563
# Матрица пересчета из видовой в оконную
M := [kx, 0, xlw - kx*xl; 0, -ky, yhw + ky*yl; 0, 0, 1] = [235.702, 0, 200; 0, -97.0563, 354.416; 0, 0, 1]
# Оконные координаты вершин пирамиды
Mw := M*P_XY = [
    700, 200, 700, 366.667, 200, 366.667;
    208.831, 354.416, 500, 100, 148.528, 197.056;
    1, 1, 1, 1, 1, 1
]
[x_c, x_b, x_a, x_c1, x_b1, x_a1; y_c, y_b, y_a, y_c1, y_b1, y_a1; q, q, q, q, q, q] := vectorize(round(Mw)) = [700, 200, 700, 367, 200, 367; 209, 354, 500, 100, 149, 197; 1, 1, 1, 1, 1, 1]
# Массивы координат X и Y для рисования пирамиды
X := transpose([x_c, x_b, x_a, x_c, x_c1, x_b1, x_b, x_b1, x_a1, x_a, x_a1, x_c1])
Y := -transpose([y_c, y_b, y_a, y_c, y_c1, y_b1, y_b, y_b1, y_a1, y_a, y_a1, y_c1])
# Оконные координаты вершин треугольника сечения Р1, Р2, Р3
TRw := M*TR_XY = [640.869, 450, 200; 189.525, 272.792, 200; 1, 1, 1]
[x_p1, x_p2, x_p3; y_p1, y_p2, y_p3; q, q, q] := vectorize(round(TRw)) = [641, 450, 200; 190, 273, 200; 1, 1, 1]
# Массивы координат Х и У для рисования сечения пирамиды
XC := transpose([x_p1, x_p2, x_p3, x_p1])
YC := -transpose([y_p1, y_p2, y_p3, y_p1])
# Декартовы координаты камеры (вектора, определяющего положение камеры)
R_C := [rv*sin(θv)*cos(φv); rv*sin(θv)*sin(φv); rv*cos(θv)] = [5; -5; 7.07107]
# График без удаления граней + сечение
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# Координаты векторов AC и AA1 (x, y, z):
AC := [pC[0]; pC[1]; pC[2]] - [pA[0]; pA[1]; pA[2]] = [-3; 3; 0]
AA1 := [pA1[0]; pA1[1]; pA1[2]] - [pA[0]; pA[1]; pA[2]] = [-2; 0; 3]
N_AA1C1C := AC×AA1 = [9; 9; 6]
A1B1 := [pB1[0]; pB1[1]; pB1[2]] - [pA1[0]; pA1[1]; pA1[2]] = [-1; 0; 0]
A1C1 := [pC1[0]; pC1[1]; pC1[2]] - [pA1[0]; pA1[1]; pA1[2]] = [-1; 1; 0]
N_A1B1C1 := A1B1×A1C1 = [0; 0; -1]
AB := [pB[0]; pB[1]; pB[2]] - [pA[0]; pA[1]; pA[2]] = [-3; 0; 0]
AC := [pC[0]; pC[1]; pC[2]] - [pA[0]; pA[1]; pA[2]] = [-3; 3; 0]
N_ABC := AB×AC = [0; 0; -9]
N_AA1B1B := AA1×AB = [0; -9; 0]
BB1 := [pB1[0]; pB1[1]; pB1[2]] - [pB[0]; pB[1]; pB[2]] = [0; 0; 3]
BC := [pC[0]; pC[1]; pC[2]] - [pB[0]; pB[1]; pB[2]] = [0; 3; 0]
N_BB1C1C := BB1×BC = [-9; 0; 0]
# Определяем видимость граней пирамиды:
q1 := N_AA1C1C*R_C = 42.4264
s1 := if(q1 ≥ 0, "Грань AA1C1C видна", "Грань AA1C1C не видна") = "Грань AA1C1C видна"
q2 := N_AA1B1B*R_C = 45
s2 := if(q2 ≥ 0, "Грань AA1B1B видна", "Грань AA1B1B не видна") = "Грань AA1B1B видна"
q3 := N_BB1C1C*R_C = -45
s3 := if(q3 ≥ 0, "Грань BB1C1C видна", "Грань BB1C1C не видна") = "Грань BB1C1C не видна"
q4 := N_ABC*R_C = -63.6396
s4 := if(q4 ≥ 0, "Грань ABC видна", "Грань ABC не видна") = "Грань ABC не видна"
q5 := N_A1B1C1*R_C = -7.07107
s5 := if(q5 ≥ 0, "Грань A1B1C1 видна", "Грань A1B1C1 не видна") = "Грань A1B1C1 не видна"
Xs := transpose([x_a, x_a1, x_c1, x_c, x_a, x_a1, x_b1, x_b, x_a, x_a1, x_b1, x_c1])
Ys := -transpose([y_a, y_a1, y_c1, y_c, y_a, y_a1, y_b1, y_b, y_a, y_a1, y_b1, y_c1])
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